units metal

atom_style atomic

lattice fcc 3.615
region box block 0 8 0 8 0 8
create_box 1 box
create_atoms 1 box
mass 1 63.546

pair_style metatomic pet-mad-latest.pt device cuda non_conservative on
pair_coeff * * 14

run_style verlet

neighbor 2.0 bin
timestep 0.001

thermo 5

velocity all create 300 87287 mom yes rot yes

fix 1 all flashmd flashmd_model.pt types 14 energy energy_model.pt device cuda rescale_energy on
# fix 2 all langevin 300.0 300.0 0.1 12345

run 10
